f(x, α, β) := (β/(x^2*sqrt(2*π))*e^(-1*(β/x - α)^2/2))
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F(x, α, β) := integral(f(x, α, β), x = 0 .. x)
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α1(α, β) := integral(x*f(x, α, β), x = 0 .. 100)
α3(α, β) := integral(x^3*f(x, α, β), x = 0 .. 100)
α2(α, β) := integral(x^2*f(x, α, β), x = 0 .. 100)
M1(α, β) := α1(α, β)
M2(α, β) := β*(1 + 1/α^2)/α
M1(4, 16) = 4.32439
M2(4, 16) = 4.25
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Mo(α, β) := root(d/dx(f(x, α, β)), x, 1, 15)
Mo(4, 16) = 3.59592
Mo(3, 14) = 3.93087
Mo(2, 12) = 4.3923
Me(α, β) := root(F(x, α, β) - 1/2, x, 1, 20)
Me(4, 16) = 4
Me(3, 14) = 4.66667
Me(2, 12) = 6
D1(α, β) := α2(α, β) - α1(α, β)^2
D2(α, β) := β^2*(1 + 8/α^2)/α^4
D1(4, 16) = 2.47755
D2(4, 16) = 1.5
D1(3, 14) = 14.2268
D2(3, 14) = 4.57064
D1(2, 12) = 70.1411
D2(2, 12) = 27
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σ(α, β) := sqrt(D1(α, β))
σ(4, 16) = 1.57402
σ(3, 14) = 3.77184
σ(2, 12) = 8.37503
μ3(α, β) := 2*α1(α, β)^3 - 3*α1(α, β)*α2(α, β) + α3(α, β)
S(α, β) := μ3(α, β)/σ(α, β)^3
S(4, 16) = 8.00269
S(3, 14) = 8.5994
S(2, 12) = 4.98009
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